// SBML level 2 version 1

model Ec_core()

  // Compartments:
  compartment default = 1 volume;

  // Species:
  species M_2pg_c in default = 0.399;
  species M_3pg_c in default = 2.13;
  species M_6pgc_c in default = 0.808;
  species M_6pgl_c in default = 0.0221;
  species M_ac_c in default = 0.36;
  species $M_ac_e in default = 0.00479;
  species M_accoa_c in default = 0.2473;
  species M_actp_c in default = 0.4;
  species M_adp_c in default = 0.595;
  species $M_akg_e in default = 0.0011;
  species M_amp_c in default = 0.955;
  species M_atp_c in default = 4.27;
  species $M_co2_c in default = 0.0221;
  species $M_co2_e in default = 1;
  species M_coa_c in default = 0.07298;
  species M_etoh_c in default = 0.0221;
  species $M_etoh_e in default = 0;
  species M_f6p_c in default = 0.6;
  species M_fad_c in default = 0.01514;
  species M_fadh2_c in default = 0.0221;
  species M_fdp_c in default = 0.272;
  species M_for_c in default = 0.0221;
  species $M_for_e in default = 0;
  species $M_fum_e in default = 0;
  species M_g6p_c in default = 3.48;
  species $M_glc_D_e in default = 0.056;
  species M_glx_c in default = 0.0001;
  species M_h2o_c in default = 58000;
  species $M_h2o_e in default = 58000;
  species $M_h_c in default = 0.0221;
  species $M_h_e in default = 1;
  species M_icit_c in default = 0.21;
  species M_lac_D_c in default = 0.0001;
  species $M_lac_D_e in default = 0.001004;
  species M_mal_L_c in default = 0.3413;
  species M_nad_c in default = 1.47;
  species M_nadh_c in default = 0.1;
  species M_nadp_c in default = 0.195;
  species M_nadph_c in default = 0.062;
  species $M_o2_c in default = 5.33;
  species $M_o2_e in default = 5.33;
  species M_oaa_c in default = 0.241;
  species M_pep_c in default = 2.67;
  species M_pi_c in default = 1;
  species $M_pi_e in default = 1;
  species M_pyr_c in default = 2.67;
  species $M_pyr_e in default = 0.001288;
  species M_q8_c in default = 0.0221;
  species M_q8h2_c in default = 0.0221;
  species M_r5p_c in default = 0.398;
  species M_ru5p_D_c in default = 0.111;
  species $M_succ_e in default = 0.006821;
  species M_xu5p_D_c in default = 0.007807;

  // Reactions:
  M3: M_accoa_c + M_oaa_c + M_h2o_c => M_icit_c + $M_h_c + M_coa_c; r0_M3*(e_M3/e0_M3)*(1 + E0_M_accoa_c_M3*ln(M_accoa_c/M_accoa_c0_M3) + E0_M_oaa_c_M3*ln(M_oaa_c/M_oaa_c0_M3) + E0_M_h2o_c_M3*ln(M_h2o_c/M_h2o_c0_M3));
    r0_M3 = 1; e_M3 = 1; e0_M3 = 1; E0_M_accoa_c_M3 = 1; M_accoa_c0_M3 = 0.2473; E0_M_oaa_c_M3 = 1; M_oaa_c0_M3 = 0.241; E0_M_h2o_c_M3 = 1; M_h2o_c0_M3 = 58000;
  M7: 0.05012335 M_atp_c + 0.009533808 M_r5p_c + 0.2754939 M_icit_c + 0.735739 M_nad_c + 0.02369789 M_oaa_c + 0.006885082 M_pep_c + 0.218191 M_fdp_c + 0.03376659 M_nadp_c + 0.01047416 M_f6p_c + 0.002719017 M_g6p_c + 0.04970894 M_accoa_c + 0.2611833 M_fad_c + 0.03757284 M_pyr_c + M_h2o_c => 0.2611833 M_mal_L_c + 0.4076679 M_3pg_c + 0.009533783 M_xu5p_D_c + 0.03376659 M_nadph_c + 0.735739 M_nadh_c + 0.2611833 M_fadh2_c + 0.05012335 M_pi_c + 0.9716451 $M_h_c + 0.05012335 M_adp_c + 0.04970894 M_coa_c + 0.5366772 $M_co2_c; r0_M7*(e_M7/e0_M7)*(1 + E0_M_atp_c_M7*ln(M_atp_c/M_atp_c0_M7) + E0_M_r5p_c_M7*ln(M_r5p_c/M_r5p_c0_M7) + E0_M_icit_c_M7*ln(M_icit_c/M_icit_c0_M7) + E0_M_nad_c_M7*ln(M_nad_c/M_nad_c0_M7) + E0_M_oaa_c_M7*ln(M_oaa_c/M_oaa_c0_M7) + E0_M_pep_c_M7*ln(M_pep_c/M_pep_c0_M7) + E0_M_fdp_c_M7*ln(M_fdp_c/M_fdp_c0_M7) + E0_M_nadp_c_M7*ln(M_nadp_c/M_nadp_c0_M7) + E0_M_f6p_c_M7*ln(M_f6p_c/M_f6p_c0_M7) + E0_M_g6p_c_M7*ln(M_g6p_c/M_g6p_c0_M7) + E0_M_accoa_c_M7*ln(M_accoa_c/M_accoa_c0_M7) + E0_M_fad_c_M7*ln(M_fad_c/M_fad_c0_M7) + E0_M_pyr_c_M7*ln(M_pyr_c/M_pyr_c0_M7) + E0_M_h2o_c_M7*ln(M_h2o_c/M_h2o_c0_M7));
    r0_M7 = 1; e_M7 = 1; e0_M7 = 1; E0_M_atp_c_M7 = 0.05012335; M_atp_c0_M7 = 4.27; E0_M_r5p_c_M7 = 0.009533808; M_r5p_c0_M7 = 0.398; E0_M_icit_c_M7 = 0.2754939; M_icit_c0_M7 = 0.21; E0_M_nad_c_M7 = 0.735739; M_nad_c0_M7 = 1.47; E0_M_oaa_c_M7 = 0.02369789; M_oaa_c0_M7 = 0.241; E0_M_pep_c_M7 = 0.006885082; M_pep_c0_M7 = 2.67; E0_M_fdp_c_M7 = 0.218191; M_fdp_c0_M7 = 0.272; E0_M_nadp_c_M7 = 0.03376659; M_nadp_c0_M7 = 0.195; E0_M_f6p_c_M7 = 0.01047416; M_f6p_c0_M7 = 0.6; E0_M_g6p_c_M7 = 0.002719017; M_g6p_c0_M7 = 3.48; E0_M_accoa_c_M7 = 0.04970894; M_accoa_c0_M7 = 0.2473; E0_M_fad_c_M7 = 0.2611833; M_fad_c0_M7 = 0.01514; E0_M_pyr_c_M7 = 0.03757284; M_pyr_c0_M7 = 2.67; E0_M_h2o_c_M7 = 1; M_h2o_c0_M7 = 58000;
  R_ACKr: M_atp_c + M_ac_c -> M_actp_c + M_adp_c; r0_R_ACKr*(e_R_ACKr/e0_R_ACKr)*(1 + E0_M_atp_c_R_ACKr*ln(M_atp_c/M_atp_c0_R_ACKr) + E0_M_ac_c_R_ACKr*ln(M_ac_c/M_ac_c0_R_ACKr) + E0_M_actp_c_R_ACKr*ln(M_actp_c/M_actp_c0_R_ACKr) + E0_M_adp_c_R_ACKr*ln(M_adp_c/M_adp_c0_R_ACKr));
    r0_R_ACKr = 1; e_R_ACKr = 1; e0_R_ACKr = 1; E0_M_atp_c_R_ACKr = 1; M_atp_c0_R_ACKr = 4.27; E0_M_ac_c_R_ACKr = 1; M_ac_c0_R_ACKr = 0.36; E0_M_actp_c_R_ACKr = -1; M_actp_c0_R_ACKr = 0.4; E0_M_adp_c_R_ACKr = -1; M_adp_c0_R_ACKr = 0.595;
  R_ACt2r: $M_h_e + $M_ac_e -> M_ac_c + $M_h_c; r0_R_ACt2r*(e_R_ACt2r/e0_R_ACt2r)*(1 + E0_M_h_e_R_ACt2r*ln(M_h_e/M_h_e0_R_ACt2r) + E0_M_ac_e_R_ACt2r*ln(M_ac_e/M_ac_e0_R_ACt2r) + E0_M_ac_c_R_ACt2r*ln(M_ac_c/M_ac_c0_R_ACt2r) + E0_M_h_c_R_ACt2r*ln(M_h_c/M_h_c0_R_ACt2r));
    r0_R_ACt2r = 1; e_R_ACt2r = 1; e0_R_ACt2r = 1; E0_M_h_e_R_ACt2r = 1; M_h_e0_R_ACt2r = 1; E0_M_ac_e_R_ACt2r = 1; M_ac_e0_R_ACt2r = 0.00479; E0_M_ac_c_R_ACt2r = -1; M_ac_c0_R_ACt2r = 0.36; E0_M_h_c_R_ACt2r = -1; M_h_c0_R_ACt2r = 0.0221;
  R_ADHEr: M_accoa_c + 2 M_nadh_c + 2 $M_h_c -> 2 M_nad_c + M_etoh_c + M_coa_c; r0_R_ADHEr*(e_R_ADHEr/e0_R_ADHEr)*(1 + E0_M_accoa_c_R_ADHEr*ln(M_accoa_c/M_accoa_c0_R_ADHEr) + E0_M_nadh_c_R_ADHEr*ln(M_nadh_c/M_nadh_c0_R_ADHEr) + E0_M_h_c_R_ADHEr*ln(M_h_c/M_h_c0_R_ADHEr) + E0_M_nad_c_R_ADHEr*ln(M_nad_c/M_nad_c0_R_ADHEr) + E0_M_etoh_c_R_ADHEr*ln(M_etoh_c/M_etoh_c0_R_ADHEr) + E0_M_coa_c_R_ADHEr*ln(M_coa_c/M_coa_c0_R_ADHEr));
    r0_R_ADHEr = 1; e_R_ADHEr = 1; e0_R_ADHEr = 1; E0_M_accoa_c_R_ADHEr = 1; M_accoa_c0_R_ADHEr = 0.2473; E0_M_nadh_c_R_ADHEr = 2; M_nadh_c0_R_ADHEr = 0.1; E0_M_h_c_R_ADHEr = 2; M_h_c0_R_ADHEr = 0.0221; E0_M_nad_c_R_ADHEr = -2; M_nad_c0_R_ADHEr = 1.47; E0_M_etoh_c_R_ADHEr = -1; M_etoh_c0_R_ADHEr = 0.0221; E0_M_coa_c_R_ADHEr = -1; M_coa_c0_R_ADHEr = 0.07298;
  R_ADK1: M_atp_c + M_amp_c -> 2 M_adp_c; r0_R_ADK1*(e_R_ADK1/e0_R_ADK1)*(1 + E0_M_atp_c_R_ADK1*ln(M_atp_c/M_atp_c0_R_ADK1) + E0_M_amp_c_R_ADK1*ln(M_amp_c/M_amp_c0_R_ADK1) + E0_M_adp_c_R_ADK1*ln(M_adp_c/M_adp_c0_R_ADK1));
    r0_R_ADK1 = 1; e_R_ADK1 = 1; e0_R_ADK1 = 1; E0_M_atp_c_R_ADK1 = 1; M_atp_c0_R_ADK1 = 4.27; E0_M_amp_c_R_ADK1 = 1; M_amp_c0_R_ADK1 = 0.955; E0_M_adp_c_R_ADK1 = -2; M_adp_c0_R_ADK1 = 0.595;
  R_ATPM: M_atp_c + M_h2o_c => M_pi_c + $M_h_c + M_adp_c; r0_R_ATPM*(e_R_ATPM/e0_R_ATPM)*(1 + E0_M_atp_c_R_ATPM*ln(M_atp_c/M_atp_c0_R_ATPM) + E0_M_h2o_c_R_ATPM*ln(M_h2o_c/M_h2o_c0_R_ATPM));
    r0_R_ATPM = 1; e_R_ATPM = 1; e0_R_ATPM = 1; E0_M_atp_c_R_ATPM = 1; M_atp_c0_R_ATPM = 4.27; E0_M_h2o_c_R_ATPM = 1; M_h2o_c0_R_ATPM = 58000;
  R_ATPS4r: 4 $M_h_e + M_pi_c + M_adp_c -> M_atp_c + 3 $M_h_c + M_h2o_c; r0_R_ATPS4r*(e_R_ATPS4r/e0_R_ATPS4r)*(1 + E0_M_h_e_R_ATPS4r*ln(M_h_e/M_h_e0_R_ATPS4r) + E0_M_pi_c_R_ATPS4r*ln(M_pi_c/M_pi_c0_R_ATPS4r) + E0_M_adp_c_R_ATPS4r*ln(M_adp_c/M_adp_c0_R_ATPS4r) + E0_M_atp_c_R_ATPS4r*ln(M_atp_c/M_atp_c0_R_ATPS4r) + E0_M_h_c_R_ATPS4r*ln(M_h_c/M_h_c0_R_ATPS4r) + E0_M_h2o_c_R_ATPS4r*ln(M_h2o_c/M_h2o_c0_R_ATPS4r));
    r0_R_ATPS4r = 1; e_R_ATPS4r = 1; e0_R_ATPS4r = 1; E0_M_h_e_R_ATPS4r = 4; M_h_e0_R_ATPS4r = 1; E0_M_pi_c_R_ATPS4r = 1; M_pi_c0_R_ATPS4r = 1; E0_M_adp_c_R_ATPS4r = 1; M_adp_c0_R_ATPS4r = 0.595; E0_M_atp_c_R_ATPS4r = -1; M_atp_c0_R_ATPS4r = 4.27; E0_M_h_c_R_ATPS4r = -3; M_h_c0_R_ATPS4r = 0.0221; E0_M_h2o_c_R_ATPS4r = -1; M_h2o_c0_R_ATPS4r = 58000;
  R_CO2t: $M_co2_c -> $M_co2_e; r0_R_CO2t*(e_R_CO2t/e0_R_CO2t)*(1 + E0_M_co2_c_R_CO2t*ln(M_co2_c/M_co2_c0_R_CO2t) + E0_M_co2_e_R_CO2t*ln(M_co2_e/M_co2_e0_R_CO2t));
    r0_R_CO2t = 1; e_R_CO2t = 1; e0_R_CO2t = 1; E0_M_co2_c_R_CO2t = 1; M_co2_c0_R_CO2t = 0.0221; E0_M_co2_e_R_CO2t = -1; M_co2_e0_R_CO2t = 1;
  R_CYTBD: 0.5 $M_o2_c + 2 $M_h_c + M_q8h2_c => 2 $M_h_e + M_h2o_c + M_q8_c; r0_R_CYTBD*(e_R_CYTBD/e0_R_CYTBD)*(1 + E0_M_o2_c_R_CYTBD*ln(M_o2_c/M_o2_c0_R_CYTBD) + E0_M_h_c_R_CYTBD*ln(M_h_c/M_h_c0_R_CYTBD) + E0_M_q8h2_c_R_CYTBD*ln(M_q8h2_c/M_q8h2_c0_R_CYTBD));
    r0_R_CYTBD = 1; e_R_CYTBD = 1; e0_R_CYTBD = 1; E0_M_o2_c_R_CYTBD = 0.5; M_o2_c0_R_CYTBD = 5.33; E0_M_h_c_R_CYTBD = 2; M_h_c0_R_CYTBD = 0.0221; E0_M_q8h2_c_R_CYTBD = 1; M_q8h2_c0_R_CYTBD = 0.0221;
  R_D_LACt2: $M_h_e + $M_lac_D_e -> M_lac_D_c + $M_h_c; r0_R_D_LACt2*(e_R_D_LACt2/e0_R_D_LACt2)*(1 + E0_M_h_e_R_D_LACt2*ln(M_h_e/M_h_e0_R_D_LACt2) + E0_M_lac_D_e_R_D_LACt2*ln(M_lac_D_e/M_lac_D_e0_R_D_LACt2) + E0_M_lac_D_c_R_D_LACt2*ln(M_lac_D_c/M_lac_D_c0_R_D_LACt2) + E0_M_h_c_R_D_LACt2*ln(M_h_c/M_h_c0_R_D_LACt2));
    r0_R_D_LACt2 = 1; e_R_D_LACt2 = 1; e0_R_D_LACt2 = 1; E0_M_h_e_R_D_LACt2 = 1; M_h_e0_R_D_LACt2 = 1; E0_M_lac_D_e_R_D_LACt2 = 1; M_lac_D_e0_R_D_LACt2 = 0.001004; E0_M_lac_D_c_R_D_LACt2 = -1; M_lac_D_c0_R_D_LACt2 = 0.0001; E0_M_h_c_R_D_LACt2 = -1; M_h_c0_R_D_LACt2 = 0.0221;
  R_ENO: M_2pg_c -> M_h2o_c + M_pep_c; r0_R_ENO*(e_R_ENO/e0_R_ENO)*(1 + E0_M_2pg_c_R_ENO*ln(M_2pg_c/M_2pg_c0_R_ENO) + E0_M_h2o_c_R_ENO*ln(M_h2o_c/M_h2o_c0_R_ENO) + E0_M_pep_c_R_ENO*ln(M_pep_c/M_pep_c0_R_ENO));
    r0_R_ENO = 1; e_R_ENO = 1; e0_R_ENO = 1; E0_M_2pg_c_R_ENO = 1; M_2pg_c0_R_ENO = 0.399; E0_M_h2o_c_R_ENO = -1; M_h2o_c0_R_ENO = 58000; E0_M_pep_c_R_ENO = -1; M_pep_c0_R_ENO = 2.67;
  R_ETOHt2r: $M_h_e + $M_etoh_e -> M_etoh_c + $M_h_c; r0_R_ETOHt2r*(e_R_ETOHt2r/e0_R_ETOHt2r)*(1 + E0_M_h_e_R_ETOHt2r*ln(M_h_e/M_h_e0_R_ETOHt2r) + E0_M_etoh_c_R_ETOHt2r*ln(M_etoh_c/M_etoh_c0_R_ETOHt2r) + E0_M_h_c_R_ETOHt2r*ln(M_h_c/M_h_c0_R_ETOHt2r));
    r0_R_ETOHt2r = 1; e_R_ETOHt2r = 1; e0_R_ETOHt2r = 1; E0_M_h_e_R_ETOHt2r = 1; M_h_e0_R_ETOHt2r = 1; E0_M_etoh_c_R_ETOHt2r = -1; M_etoh_c0_R_ETOHt2r = 0.0221; E0_M_h_c_R_ETOHt2r = -1; M_h_c0_R_ETOHt2r = 0.0221;
  R_EX_ac_e_: $M_ac_e => ; r0_R_EX_ac_e_*(e_R_EX_ac_e_/e0_R_EX_ac_e_)*(1 + E0_M_ac_e_R_EX_ac_e_*ln(M_ac_e/M_ac_e0_R_EX_ac_e_));
    r0_R_EX_ac_e_ = 1; e_R_EX_ac_e_ = 1; e0_R_EX_ac_e_ = 1; E0_M_ac_e_R_EX_ac_e_ = 1; M_ac_e0_R_EX_ac_e_ = 0.00479;
  R_EX_akg_e_: $M_akg_e => ; r0_R_EX_akg_e_*(e_R_EX_akg_e_/e0_R_EX_akg_e_)*(1 + E0_M_akg_e_R_EX_akg_e_*ln(M_akg_e/M_akg_e0_R_EX_akg_e_));
    r0_R_EX_akg_e_ = 1; e_R_EX_akg_e_ = 1; e0_R_EX_akg_e_ = 1; E0_M_akg_e_R_EX_akg_e_ = 1; M_akg_e0_R_EX_akg_e_ = 0.0011;
  R_EX_co2_e_: $M_co2_e => ; r0_R_EX_co2_e_*(e_R_EX_co2_e_/e0_R_EX_co2_e_)*(1 + E0_M_co2_e_R_EX_co2_e_*ln(M_co2_e/M_co2_e0_R_EX_co2_e_));
    r0_R_EX_co2_e_ = 1; e_R_EX_co2_e_ = 1; e0_R_EX_co2_e_ = 1; E0_M_co2_e_R_EX_co2_e_ = 1; M_co2_e0_R_EX_co2_e_ = 1;
  R_EX_etoh_e_: $M_etoh_e => ; r0_R_EX_etoh_e_*(e_R_EX_etoh_e_/e0_R_EX_etoh_e_)*1;
    r0_R_EX_etoh_e_ = 1; e_R_EX_etoh_e_ = 1; e0_R_EX_etoh_e_ = 1;
  R_EX_for_e_: $M_for_e => ; r0_R_EX_for_e_*(e_R_EX_for_e_/e0_R_EX_for_e_)*1;
    r0_R_EX_for_e_ = 1; e_R_EX_for_e_ = 1; e0_R_EX_for_e_ = 1;
  R_EX_fum_e_: $M_fum_e => ; r0_R_EX_fum_e_*(e_R_EX_fum_e_/e0_R_EX_fum_e_)*1;
    r0_R_EX_fum_e_ = 1; e_R_EX_fum_e_ = 1; e0_R_EX_fum_e_ = 1;
  R_EX_glc_e_: => $M_glc_D_e; r0_R_EX_glc_e_*(e_R_EX_glc_e_/e0_R_EX_glc_e_)*1;
    r0_R_EX_glc_e_ = 1; e_R_EX_glc_e_ = 1; e0_R_EX_glc_e_ = 1;
  R_EX_h2o_e_: $M_h2o_e => ; r0_R_EX_h2o_e_*(e_R_EX_h2o_e_/e0_R_EX_h2o_e_)*(1 + E0_M_h2o_e_R_EX_h2o_e_*ln(M_h2o_e/M_h2o_e0_R_EX_h2o_e_));
    r0_R_EX_h2o_e_ = 1; e_R_EX_h2o_e_ = 1; e0_R_EX_h2o_e_ = 1; E0_M_h2o_e_R_EX_h2o_e_ = 1; M_h2o_e0_R_EX_h2o_e_ = 58000;
  R_EX_h_e_: $M_h_e => ; r0_R_EX_h_e_*(e_R_EX_h_e_/e0_R_EX_h_e_)*(1 + E0_M_h_e_R_EX_h_e_*ln(M_h_e/M_h_e0_R_EX_h_e_));
    r0_R_EX_h_e_ = 1; e_R_EX_h_e_ = 1; e0_R_EX_h_e_ = 1; E0_M_h_e_R_EX_h_e_ = 1; M_h_e0_R_EX_h_e_ = 1;
  R_EX_lac_D_e_: $M_lac_D_e => ; r0_R_EX_lac_D_e_*(e_R_EX_lac_D_e_/e0_R_EX_lac_D_e_)*(1 + E0_M_lac_D_e_R_EX_lac_D_e_*ln(M_lac_D_e/M_lac_D_e0_R_EX_lac_D_e_));
    r0_R_EX_lac_D_e_ = 1; e_R_EX_lac_D_e_ = 1; e0_R_EX_lac_D_e_ = 1; E0_M_lac_D_e_R_EX_lac_D_e_ = 1; M_lac_D_e0_R_EX_lac_D_e_ = 0.001004;
  R_EX_o2_e_: => $M_o2_e; r0_R_EX_o2_e_*(e_R_EX_o2_e_/e0_R_EX_o2_e_)*1;
    r0_R_EX_o2_e_ = 1; e_R_EX_o2_e_ = 1; e0_R_EX_o2_e_ = 1;
  R_EX_pi_e_: => $M_pi_e; r0_R_EX_pi_e_*(e_R_EX_pi_e_/e0_R_EX_pi_e_)*1;
    r0_R_EX_pi_e_ = 1; e_R_EX_pi_e_ = 1; e0_R_EX_pi_e_ = 1;
  R_EX_pyr_e_: $M_pyr_e => ; r0_R_EX_pyr_e_*(e_R_EX_pyr_e_/e0_R_EX_pyr_e_)*(1 + E0_M_pyr_e_R_EX_pyr_e_*ln(M_pyr_e/M_pyr_e0_R_EX_pyr_e_));
    r0_R_EX_pyr_e_ = 1; e_R_EX_pyr_e_ = 1; e0_R_EX_pyr_e_ = 1; E0_M_pyr_e_R_EX_pyr_e_ = 1; M_pyr_e0_R_EX_pyr_e_ = 0.001288;
  R_EX_succ_e_: $M_succ_e => ; r0_R_EX_succ_e_*(e_R_EX_succ_e_/e0_R_EX_succ_e_)*(1 + E0_M_succ_e_R_EX_succ_e_*ln(M_succ_e/M_succ_e0_R_EX_succ_e_));
    r0_R_EX_succ_e_ = 1; e_R_EX_succ_e_ = 1; e0_R_EX_succ_e_ = 1; E0_M_succ_e_R_EX_succ_e_ = 1; M_succ_e0_R_EX_succ_e_ = 0.006821;
  R_FBP: M_h2o_c + M_fdp_c => M_pi_c + M_f6p_c; r0_R_FBP*(e_R_FBP/e0_R_FBP)*(1 + E0_M_h2o_c_R_FBP*ln(M_h2o_c/M_h2o_c0_R_FBP) + E0_M_fdp_c_R_FBP*ln(M_fdp_c/M_fdp_c0_R_FBP));
    r0_R_FBP = 1; e_R_FBP = 1; e0_R_FBP = 1; E0_M_h2o_c_R_FBP = 1; M_h2o_c0_R_FBP = 58000; E0_M_fdp_c_R_FBP = 1; M_fdp_c0_R_FBP = 0.272;
  R_FORt: $M_for_e -> M_for_c; r0_R_FORt*(e_R_FORt/e0_R_FORt)*(1 + E0_M_for_c_R_FORt*ln(M_for_c/M_for_c0_R_FORt));
    r0_R_FORt = 1; e_R_FORt = 1; e0_R_FORt = 1; E0_M_for_c_R_FORt = -1; M_for_c0_R_FORt = 0.0221;
  R_G6PDH2r: M_nadp_c + M_g6p_c -> M_nadph_c + $M_h_c + M_6pgl_c; r0_R_G6PDH2r*(e_R_G6PDH2r/e0_R_G6PDH2r)*(1 + E0_M_nadp_c_R_G6PDH2r*ln(M_nadp_c/M_nadp_c0_R_G6PDH2r) + E0_M_g6p_c_R_G6PDH2r*ln(M_g6p_c/M_g6p_c0_R_G6PDH2r) + E0_M_nadph_c_R_G6PDH2r*ln(M_nadph_c/M_nadph_c0_R_G6PDH2r) + E0_M_h_c_R_G6PDH2r*ln(M_h_c/M_h_c0_R_G6PDH2r) + E0_M_6pgl_c_R_G6PDH2r*ln(M_6pgl_c/M_6pgl_c0_R_G6PDH2r));
    r0_R_G6PDH2r = 1; e_R_G6PDH2r = 1; e0_R_G6PDH2r = 1; E0_M_nadp_c_R_G6PDH2r = 1; M_nadp_c0_R_G6PDH2r = 0.195; E0_M_g6p_c_R_G6PDH2r = 1; M_g6p_c0_R_G6PDH2r = 3.48; E0_M_nadph_c_R_G6PDH2r = -1; M_nadph_c0_R_G6PDH2r = 0.062; E0_M_h_c_R_G6PDH2r = -1; M_h_c0_R_G6PDH2r = 0.0221; E0_M_6pgl_c_R_G6PDH2r = -1; M_6pgl_c0_R_G6PDH2r = 0.0221;
  R_GLCpts: M_pep_c + $M_glc_D_e => M_pyr_c + M_g6p_c; r0_R_GLCpts*(e_R_GLCpts/e0_R_GLCpts)*(1 + E0_M_pep_c_R_GLCpts*ln(M_pep_c/M_pep_c0_R_GLCpts) + E0_M_glc_D_e_R_GLCpts*ln(M_glc_D_e/M_glc_D_e0_R_GLCpts));
    r0_R_GLCpts = 1; e_R_GLCpts = 1; e0_R_GLCpts = 1; E0_M_pep_c_R_GLCpts = 1; M_pep_c0_R_GLCpts = 2.67; E0_M_glc_D_e_R_GLCpts = 1; M_glc_D_e0_R_GLCpts = 0.056;
  R_GND: M_nadp_c + M_6pgc_c => M_nadph_c + M_ru5p_D_c + $M_co2_c; r0_R_GND*(e_R_GND/e0_R_GND)*(1 + E0_M_nadp_c_R_GND*ln(M_nadp_c/M_nadp_c0_R_GND) + E0_M_6pgc_c_R_GND*ln(M_6pgc_c/M_6pgc_c0_R_GND));
    r0_R_GND = 1; e_R_GND = 1; e0_R_GND = 1; E0_M_nadp_c_R_GND = 1; M_nadp_c0_R_GND = 0.195; E0_M_6pgc_c_R_GND = 1; M_6pgc_c0_R_GND = 0.808;
  R_H2Ot: M_h2o_c -> $M_h2o_e; r0_R_H2Ot*(e_R_H2Ot/e0_R_H2Ot)*(1 + E0_M_h2o_c_R_H2Ot*ln(M_h2o_c/M_h2o_c0_R_H2Ot) + E0_M_h2o_e_R_H2Ot*ln(M_h2o_e/M_h2o_e0_R_H2Ot));
    r0_R_H2Ot = 1; e_R_H2Ot = 1; e0_R_H2Ot = 1; E0_M_h2o_c_R_H2Ot = 1; M_h2o_c0_R_H2Ot = 58000; E0_M_h2o_e_R_H2Ot = -1; M_h2o_e0_R_H2Ot = 58000;
  R_LDH_D: M_lac_D_c + M_nad_c -> M_nadh_c + M_pyr_c + $M_h_c; r0_R_LDH_D*(e_R_LDH_D/e0_R_LDH_D)*(1 + E0_M_lac_D_c_R_LDH_D*ln(M_lac_D_c/M_lac_D_c0_R_LDH_D) + E0_M_nad_c_R_LDH_D*ln(M_nad_c/M_nad_c0_R_LDH_D) + E0_M_nadh_c_R_LDH_D*ln(M_nadh_c/M_nadh_c0_R_LDH_D) + E0_M_pyr_c_R_LDH_D*ln(M_pyr_c/M_pyr_c0_R_LDH_D) + E0_M_h_c_R_LDH_D*ln(M_h_c/M_h_c0_R_LDH_D));
    r0_R_LDH_D = 1; e_R_LDH_D = 1; e0_R_LDH_D = 1; E0_M_lac_D_c_R_LDH_D = 1; M_lac_D_c0_R_LDH_D = 0.0001; E0_M_nad_c_R_LDH_D = 1; M_nad_c0_R_LDH_D = 1.47; E0_M_nadh_c_R_LDH_D = -1; M_nadh_c0_R_LDH_D = 0.1; E0_M_pyr_c_R_LDH_D = -1; M_pyr_c0_R_LDH_D = 2.67; E0_M_h_c_R_LDH_D = -1; M_h_c0_R_LDH_D = 0.0221;
  R_MALS: M_accoa_c + M_glx_c + M_h2o_c => M_mal_L_c + $M_h_c + M_coa_c; r0_R_MALS*(e_R_MALS/e0_R_MALS)*(1 + E0_M_accoa_c_R_MALS*ln(M_accoa_c/M_accoa_c0_R_MALS) + E0_M_glx_c_R_MALS*ln(M_glx_c/M_glx_c0_R_MALS) + E0_M_h2o_c_R_MALS*ln(M_h2o_c/M_h2o_c0_R_MALS));
    r0_R_MALS = 1; e_R_MALS = 1; e0_R_MALS = 1; E0_M_accoa_c_R_MALS = 1; M_accoa_c0_R_MALS = 0.2473; E0_M_glx_c_R_MALS = 1; M_glx_c0_R_MALS = 0.0001; E0_M_h2o_c_R_MALS = 1; M_h2o_c0_R_MALS = 58000;
  R_MDH: M_mal_L_c + M_nad_c -> M_nadh_c + M_oaa_c + $M_h_c; r0_R_MDH*(e_R_MDH/e0_R_MDH)*(1 + E0_M_mal_L_c_R_MDH*ln(M_mal_L_c/M_mal_L_c0_R_MDH) + E0_M_nad_c_R_MDH*ln(M_nad_c/M_nad_c0_R_MDH) + E0_M_nadh_c_R_MDH*ln(M_nadh_c/M_nadh_c0_R_MDH) + E0_M_oaa_c_R_MDH*ln(M_oaa_c/M_oaa_c0_R_MDH) + E0_M_h_c_R_MDH*ln(M_h_c/M_h_c0_R_MDH));
    r0_R_MDH = 1; e_R_MDH = 1; e0_R_MDH = 1; E0_M_mal_L_c_R_MDH = 1; M_mal_L_c0_R_MDH = 0.3413; E0_M_nad_c_R_MDH = 1; M_nad_c0_R_MDH = 1.47; E0_M_nadh_c_R_MDH = -1; M_nadh_c0_R_MDH = 0.1; E0_M_oaa_c_R_MDH = -1; M_oaa_c0_R_MDH = 0.241; E0_M_h_c_R_MDH = -1; M_h_c0_R_MDH = 0.0221;
  R_ME1: M_mal_L_c + M_nad_c => M_nadh_c + M_pyr_c + $M_co2_c; r0_R_ME1*(e_R_ME1/e0_R_ME1)*(1 + E0_M_mal_L_c_R_ME1*ln(M_mal_L_c/M_mal_L_c0_R_ME1) + E0_M_nad_c_R_ME1*ln(M_nad_c/M_nad_c0_R_ME1));
    r0_R_ME1 = 1; e_R_ME1 = 1; e0_R_ME1 = 1; E0_M_mal_L_c_R_ME1 = 1; M_mal_L_c0_R_ME1 = 0.3413; E0_M_nad_c_R_ME1 = 1; M_nad_c0_R_ME1 = 1.47;
  R_ME2: M_mal_L_c + M_nadp_c => M_nadph_c + M_pyr_c + $M_co2_c; r0_R_ME2*(e_R_ME2/e0_R_ME2)*(1 + E0_M_mal_L_c_R_ME2*ln(M_mal_L_c/M_mal_L_c0_R_ME2) + E0_M_nadp_c_R_ME2*ln(M_nadp_c/M_nadp_c0_R_ME2));
    r0_R_ME2 = 1; e_R_ME2 = 1; e0_R_ME2 = 1; E0_M_mal_L_c_R_ME2 = 1; M_mal_L_c0_R_ME2 = 0.3413; E0_M_nadp_c_R_ME2 = 1; M_nadp_c0_R_ME2 = 0.195;
  R_NADH11: M_nadh_c + 3 $M_h_c + M_q8_c => M_nad_c + 2 $M_h_e + M_q8h2_c; r0_R_NADH11*(e_R_NADH11/e0_R_NADH11)*(1 + E0_M_nadh_c_R_NADH11*ln(M_nadh_c/M_nadh_c0_R_NADH11) + E0_M_h_c_R_NADH11*ln(M_h_c/M_h_c0_R_NADH11) + E0_M_q8_c_R_NADH11*ln(M_q8_c/M_q8_c0_R_NADH11));
    r0_R_NADH11 = 1; e_R_NADH11 = 1; e0_R_NADH11 = 1; E0_M_nadh_c_R_NADH11 = 1; M_nadh_c0_R_NADH11 = 0.1; E0_M_h_c_R_NADH11 = 3; M_h_c0_R_NADH11 = 0.0221; E0_M_q8_c_R_NADH11 = 1; M_q8_c0_R_NADH11 = 0.0221;
  R_NADTRHD: M_nadph_c + M_nad_c => M_nadh_c + M_nadp_c; r0_R_NADTRHD*(e_R_NADTRHD/e0_R_NADTRHD)*(1 + E0_M_nadph_c_R_NADTRHD*ln(M_nadph_c/M_nadph_c0_R_NADTRHD) + E0_M_nad_c_R_NADTRHD*ln(M_nad_c/M_nad_c0_R_NADTRHD));
    r0_R_NADTRHD = 1; e_R_NADTRHD = 1; e0_R_NADTRHD = 1; E0_M_nadph_c_R_NADTRHD = 1; M_nadph_c0_R_NADTRHD = 0.062; E0_M_nad_c_R_NADTRHD = 1; M_nad_c0_R_NADTRHD = 1.47;
  R_O2t: $M_o2_e -> $M_o2_c; r0_R_O2t*(e_R_O2t/e0_R_O2t)*(1 + E0_M_o2_e_R_O2t*ln(M_o2_e/M_o2_e0_R_O2t) + E0_M_o2_c_R_O2t*ln(M_o2_c/M_o2_c0_R_O2t));
    r0_R_O2t = 1; e_R_O2t = 1; e0_R_O2t = 1; E0_M_o2_e_R_O2t = 1; M_o2_e0_R_O2t = 5.33; E0_M_o2_c_R_O2t = -1; M_o2_c0_R_O2t = 5.33;
  R_PDH: M_nad_c + M_pyr_c + M_coa_c => M_accoa_c + M_nadh_c + $M_co2_c; r0_R_PDH*(e_R_PDH/e0_R_PDH)*(1 + E0_M_nad_c_R_PDH*ln(M_nad_c/M_nad_c0_R_PDH) + E0_M_pyr_c_R_PDH*ln(M_pyr_c/M_pyr_c0_R_PDH) + E0_M_coa_c_R_PDH*ln(M_coa_c/M_coa_c0_R_PDH));
    r0_R_PDH = 1; e_R_PDH = 1; e0_R_PDH = 1; E0_M_nad_c_R_PDH = 1; M_nad_c0_R_PDH = 1.47; E0_M_pyr_c_R_PDH = 1; M_pyr_c0_R_PDH = 2.67; E0_M_coa_c_R_PDH = 1; M_coa_c0_R_PDH = 0.07298;
  R_PFK: M_atp_c + M_f6p_c => $M_h_c + M_adp_c + M_fdp_c; r0_R_PFK*(e_R_PFK/e0_R_PFK)*(1 + E0_M_atp_c_R_PFK*ln(M_atp_c/M_atp_c0_R_PFK) + E0_M_f6p_c_R_PFK*ln(M_f6p_c/M_f6p_c0_R_PFK));
    r0_R_PFK = 1; e_R_PFK = 1; e0_R_PFK = 1; E0_M_atp_c_R_PFK = 1; M_atp_c0_R_PFK = 4.27; E0_M_f6p_c_R_PFK = 1; M_f6p_c0_R_PFK = 0.6;
  R_PFL: M_pyr_c + M_coa_c => M_accoa_c + M_for_c; r0_R_PFL*(e_R_PFL/e0_R_PFL)*(1 + E0_M_pyr_c_R_PFL*ln(M_pyr_c/M_pyr_c0_R_PFL) + E0_M_coa_c_R_PFL*ln(M_coa_c/M_coa_c0_R_PFL));
    r0_R_PFL = 1; e_R_PFL = 1; e0_R_PFL = 1; E0_M_pyr_c_R_PFL = 1; M_pyr_c0_R_PFL = 2.67; E0_M_coa_c_R_PFL = 1; M_coa_c0_R_PFL = 0.07298;
  R_PGI: M_g6p_c -> M_f6p_c; r0_R_PGI*(e_R_PGI/e0_R_PGI)*(1 + E0_M_g6p_c_R_PGI*ln(M_g6p_c/M_g6p_c0_R_PGI) + E0_M_f6p_c_R_PGI*ln(M_f6p_c/M_f6p_c0_R_PGI));
    r0_R_PGI = 1; e_R_PGI = 1; e0_R_PGI = 1; E0_M_g6p_c_R_PGI = 1; M_g6p_c0_R_PGI = 3.48; E0_M_f6p_c_R_PGI = -1; M_f6p_c0_R_PGI = 0.6;
  R_PGL: M_6pgl_c + M_h2o_c => $M_h_c + M_6pgc_c; r0_R_PGL*(e_R_PGL/e0_R_PGL)*(1 + E0_M_6pgl_c_R_PGL*ln(M_6pgl_c/M_6pgl_c0_R_PGL) + E0_M_h2o_c_R_PGL*ln(M_h2o_c/M_h2o_c0_R_PGL));
    r0_R_PGL = 1; e_R_PGL = 1; e0_R_PGL = 1; E0_M_6pgl_c_R_PGL = 1; M_6pgl_c0_R_PGL = 0.0221; E0_M_h2o_c_R_PGL = 1; M_h2o_c0_R_PGL = 58000;
  R_PGM: M_3pg_c -> M_2pg_c; r0_R_PGM*(e_R_PGM/e0_R_PGM)*(1 + E0_M_3pg_c_R_PGM*ln(M_3pg_c/M_3pg_c0_R_PGM) + E0_M_2pg_c_R_PGM*ln(M_2pg_c/M_2pg_c0_R_PGM));
    r0_R_PGM = 1; e_R_PGM = 1; e0_R_PGM = 1; E0_M_3pg_c_R_PGM = 1; M_3pg_c0_R_PGM = 2.13; E0_M_2pg_c_R_PGM = -1; M_2pg_c0_R_PGM = 0.399;
  R_PIt: $M_pi_e -> M_pi_c; r0_R_PIt*(e_R_PIt/e0_R_PIt)*(1 + E0_M_pi_e_R_PIt*ln(M_pi_e/M_pi_e0_R_PIt) + E0_M_pi_c_R_PIt*ln(M_pi_c/M_pi_c0_R_PIt));
    r0_R_PIt = 1; e_R_PIt = 1; e0_R_PIt = 1; E0_M_pi_e_R_PIt = 1; M_pi_e0_R_PIt = 1; E0_M_pi_c_R_PIt = -1; M_pi_c0_R_PIt = 1;
  R_PPC: M_h2o_c + M_pep_c + $M_co2_c => $M_h_c + M_oaa_c + M_pi_c; r0_R_PPC*(e_R_PPC/e0_R_PPC)*(1 + E0_M_h2o_c_R_PPC*ln(M_h2o_c/M_h2o_c0_R_PPC) + E0_M_pep_c_R_PPC*ln(M_pep_c/M_pep_c0_R_PPC) + E0_M_co2_c_R_PPC*ln(M_co2_c/M_co2_c0_R_PPC));
    r0_R_PPC = 1; e_R_PPC = 1; e0_R_PPC = 1; E0_M_h2o_c_R_PPC = 1; M_h2o_c0_R_PPC = 58000; E0_M_pep_c_R_PPC = 1; M_pep_c0_R_PPC = 2.67; E0_M_co2_c_R_PPC = 1; M_co2_c0_R_PPC = 0.0221;
  R_PPCK: M_atp_c + M_oaa_c => M_adp_c + M_pep_c + $M_co2_c; r0_R_PPCK*(e_R_PPCK/e0_R_PPCK)*(1 + E0_M_atp_c_R_PPCK*ln(M_atp_c/M_atp_c0_R_PPCK) + E0_M_oaa_c_R_PPCK*ln(M_oaa_c/M_oaa_c0_R_PPCK));
    r0_R_PPCK = 1; e_R_PPCK = 1; e0_R_PPCK = 1; E0_M_atp_c_R_PPCK = 1; M_atp_c0_R_PPCK = 4.27; E0_M_oaa_c_R_PPCK = 1; M_oaa_c0_R_PPCK = 0.241;
  R_PPS: M_atp_c + M_pyr_c + M_h2o_c => M_amp_c + M_pi_c + 2 $M_h_c + M_pep_c; r0_R_PPS*(e_R_PPS/e0_R_PPS)*(1 + E0_M_atp_c_R_PPS*ln(M_atp_c/M_atp_c0_R_PPS) + E0_M_pyr_c_R_PPS*ln(M_pyr_c/M_pyr_c0_R_PPS) + E0_M_h2o_c_R_PPS*ln(M_h2o_c/M_h2o_c0_R_PPS));
    r0_R_PPS = 1; e_R_PPS = 1; e0_R_PPS = 1; E0_M_atp_c_R_PPS = 1; M_atp_c0_R_PPS = 4.27; E0_M_pyr_c_R_PPS = 1; M_pyr_c0_R_PPS = 2.67; E0_M_h2o_c_R_PPS = 1; M_h2o_c0_R_PPS = 58000;
  R_PTAr: M_accoa_c + M_pi_c -> M_actp_c + M_coa_c; r0_R_PTAr*(e_R_PTAr/e0_R_PTAr)*(1 + E0_M_accoa_c_R_PTAr*ln(M_accoa_c/M_accoa_c0_R_PTAr) + E0_M_pi_c_R_PTAr*ln(M_pi_c/M_pi_c0_R_PTAr) + E0_M_actp_c_R_PTAr*ln(M_actp_c/M_actp_c0_R_PTAr) + E0_M_coa_c_R_PTAr*ln(M_coa_c/M_coa_c0_R_PTAr));
    r0_R_PTAr = 1; e_R_PTAr = 1; e0_R_PTAr = 1; E0_M_accoa_c_R_PTAr = 1; M_accoa_c0_R_PTAr = 0.2473; E0_M_pi_c_R_PTAr = 1; M_pi_c0_R_PTAr = 1; E0_M_actp_c_R_PTAr = -1; M_actp_c0_R_PTAr = 0.4; E0_M_coa_c_R_PTAr = -1; M_coa_c0_R_PTAr = 0.07298;
  R_PYK: $M_h_c + M_adp_c + M_pep_c => M_atp_c + M_pyr_c; r0_R_PYK*(e_R_PYK/e0_R_PYK)*(1 + E0_M_h_c_R_PYK*ln(M_h_c/M_h_c0_R_PYK) + E0_M_adp_c_R_PYK*ln(M_adp_c/M_adp_c0_R_PYK) + E0_M_pep_c_R_PYK*ln(M_pep_c/M_pep_c0_R_PYK));
    r0_R_PYK = 1; e_R_PYK = 1; e0_R_PYK = 1; E0_M_h_c_R_PYK = 1; M_h_c0_R_PYK = 0.0221; E0_M_adp_c_R_PYK = 1; M_adp_c0_R_PYK = 0.595; E0_M_pep_c_R_PYK = 1; M_pep_c0_R_PYK = 2.67;
  R_PYRt2r: $M_h_e + $M_pyr_e -> M_pyr_c + $M_h_c; r0_R_PYRt2r*(e_R_PYRt2r/e0_R_PYRt2r)*(1 + E0_M_h_e_R_PYRt2r*ln(M_h_e/M_h_e0_R_PYRt2r) + E0_M_pyr_e_R_PYRt2r*ln(M_pyr_e/M_pyr_e0_R_PYRt2r) + E0_M_pyr_c_R_PYRt2r*ln(M_pyr_c/M_pyr_c0_R_PYRt2r) + E0_M_h_c_R_PYRt2r*ln(M_h_c/M_h_c0_R_PYRt2r));
    r0_R_PYRt2r = 1; e_R_PYRt2r = 1; e0_R_PYRt2r = 1; E0_M_h_e_R_PYRt2r = 1; M_h_e0_R_PYRt2r = 1; E0_M_pyr_e_R_PYRt2r = 1; M_pyr_e0_R_PYRt2r = 0.001288; E0_M_pyr_c_R_PYRt2r = -1; M_pyr_c0_R_PYRt2r = 2.67; E0_M_h_c_R_PYRt2r = -1; M_h_c0_R_PYRt2r = 0.0221;
  R_RPE: M_xu5p_D_c -> M_ru5p_D_c; r0_R_RPE*(e_R_RPE/e0_R_RPE)*(1 + E0_M_xu5p_D_c_R_RPE*ln(M_xu5p_D_c/M_xu5p_D_c0_R_RPE) + E0_M_ru5p_D_c_R_RPE*ln(M_ru5p_D_c/M_ru5p_D_c0_R_RPE));
    r0_R_RPE = 1; e_R_RPE = 1; e0_R_RPE = 1; E0_M_xu5p_D_c_R_RPE = 1; M_xu5p_D_c0_R_RPE = 0.007807; E0_M_ru5p_D_c_R_RPE = -1; M_ru5p_D_c0_R_RPE = 0.111;
  R_RPI: M_ru5p_D_c -> M_r5p_c; r0_R_RPI*(e_R_RPI/e0_R_RPI)*(1 + E0_M_ru5p_D_c_R_RPI*ln(M_ru5p_D_c/M_ru5p_D_c0_R_RPI) + E0_M_r5p_c_R_RPI*ln(M_r5p_c/M_r5p_c0_R_RPI));
    r0_R_RPI = 1; e_R_RPI = 1; e0_R_RPI = 1; E0_M_ru5p_D_c_R_RPI = 1; M_ru5p_D_c0_R_RPI = 0.111; E0_M_r5p_c_R_RPI = -1; M_r5p_c0_R_RPI = 0.398;
  R_SUCD4: M_fadh2_c + M_q8_c -> M_fad_c + M_q8h2_c; r0_R_SUCD4*(e_R_SUCD4/e0_R_SUCD4)*(1 + E0_M_fadh2_c_R_SUCD4*ln(M_fadh2_c/M_fadh2_c0_R_SUCD4) + E0_M_q8_c_R_SUCD4*ln(M_q8_c/M_q8_c0_R_SUCD4) + E0_M_fad_c_R_SUCD4*ln(M_fad_c/M_fad_c0_R_SUCD4) + E0_M_q8h2_c_R_SUCD4*ln(M_q8h2_c/M_q8h2_c0_R_SUCD4));
    r0_R_SUCD4 = 1; e_R_SUCD4 = 1; e0_R_SUCD4 = 1; E0_M_fadh2_c_R_SUCD4 = 1; M_fadh2_c0_R_SUCD4 = 0.0221; E0_M_q8_c_R_SUCD4 = 1; M_q8_c0_R_SUCD4 = 0.0221; E0_M_fad_c_R_SUCD4 = -1; M_fad_c0_R_SUCD4 = 0.01514; E0_M_q8h2_c_R_SUCD4 = -1; M_q8h2_c0_R_SUCD4 = 0.0221;
  R_THD2: M_nadh_c + 2 $M_h_e + M_nadp_c => M_nad_c + M_nadph_c + 2 $M_h_c; r0_R_THD2*(e_R_THD2/e0_R_THD2)*(1 + E0_M_nadh_c_R_THD2*ln(M_nadh_c/M_nadh_c0_R_THD2) + E0_M_h_e_R_THD2*ln(M_h_e/M_h_e0_R_THD2) + E0_M_nadp_c_R_THD2*ln(M_nadp_c/M_nadp_c0_R_THD2));
    r0_R_THD2 = 1; e_R_THD2 = 1; e0_R_THD2 = 1; E0_M_nadh_c_R_THD2 = 1; M_nadh_c0_R_THD2 = 0.1; E0_M_h_e_R_THD2 = 2; M_h_e0_R_THD2 = 1; E0_M_nadp_c_R_THD2 = 1; M_nadp_c0_R_THD2 = 0.195;

  // Unit definitions:
  unit substance = mole;
  unit volume = litre;
  unit area = metre^2;
  unit length = metre;
  unit time = second;
end
